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/batch
! ANSYS input file written by Workbench version 2021 R2
! File used for geometry attach: C:\Users\wilus\Mój dysk\PG\Ansys\ansys projekt 6\walek tuleja_files\dp0\SYS\DM\SYS.agdb
/title,walek tuleja--Static Structural (A5)
/com,--- Data in consistent NMM units. See Solving Units in the help system for more information.
/units,MPA
/prep7
! Turn off shape checking because checks already performed inside WB mesher.
! See help system for more information.
SHPP,OFF,,NOWARN
etcon,set             ! allow ANSYS to choose best KEYOP's for 180x elements, resets any applicable keyopt to MAPDL defaults
/com,*********** Nodes for the whole assembly ***********
nblock,3,,13635
(1i9,3e20.9e3)
        1     4.100000000E+01     1.274746252E-14    -2.250000000E+01
        2     4.100000000E+01    -7.695453225E+00    -2.114308397E+01
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-1
/com,*********** Elements for Body 1 "wal" ***********
et,1,187
eblock,19,solid,,3765
(19i9)
        1        1        1        1        0        0        0        0       10        0     2943     5782     5804     6619     6614     8283     8415     8287     8286
     8414    12396
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-1
/com,*********** Elements for Body 2 "Solid" ***********
et,2,187
eblock,19,solid,,2942
(19i9)
        2        2        2        2        0        0        0        0       10        0        1      710      904      831      777     4799     5410     4798     4797
     5190     5187
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-1
/com,*********** Send User Defined Coordinate System(s) ***********
csys,0
toffst,273.15,  ! Temperature offset from absolute zero
/com,*********** Set Reference Temperature ***********
tref,22.
/com,*********** Send Materials ***********
Temperature = 'TEMP' ! Temperature
MP,DENS,1,7.85e-09,	! tonne mm^-3
MP,ALPX,1,1.2e-05,	! C^-1
MP,C,1,434000000,	! mm^2 s^-2 C^-1
MP,KXX,1,60.5,	! tonne mm s^-3 C^-1
MP,RSVX,1,0.00017,	! ohm mm
MP,EX,1,200000,	! tonne s^-2 mm^-1
MP,NUXY,1,0.3,
MP,MURX,1,10000,

Temperature = 'TEMP' ! Temperature
MP,DENS,2,7.85e-09,	! tonne mm^-3
MP,ALPX,2,1.2e-05,	! C^-1
MP,C,2,434000000,	! mm^2 s^-2 C^-1
MP,KXX,2,60.5,	! tonne mm s^-3 C^-1
MP,RSVX,2,0.00017,	! ohm mm
MP,EX,2,200000,	! tonne s^-2 mm^-1
MP,NUXY,2,0.3,
MP,MURX,2,10000,

!************************* Model Summary ********************
!wal,	Structural Steel,	matid,	1
!Solid,	Structural Steel,	matid,	2
!************************* End Model Summary ********************
/com,*********** Create Contact "Frictionless - wal To Solid" ***********
*set,tid,4
*set,cid,3
r,tid
r,cid
et,tid,170
et,cid,174
eblock,10,,,610
(15i9)
     9932        4        4        4        0     6138     6117     6152     6152    10052    10054     6152    10201
     9933        4        4        4        0     6131     6113     6149     6149    10024    10025     6149    10157
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-1
eblock,10,,,610
(15i9)
    10542        3        3        3        0     6138     6117     6152     6152    10052    10054     6152    10201
    10543        3        3        3        0     6131     6113     6149     6149    10024    10025     6149    10157
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-1
eblock,10,,,676
(15i9)
    11152        3        4        3        0      116      101      428      428     1604     1606      428     1691
    11153        3        4        3        0       69       84      416      416     1489     1528      416     1491
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-1
eblock,10,,,676
(15i9)
    11828        4        3        4        0      116      101      428      428     1604     1606      428     1691
    11829        4        3        4        0       69       84      416      416     1489     1528      416     1491
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-1
keyo,cid,8,2               ! auto create asymmetric contact (from Program Controlled setting)
keyo,cid,10,0              ! adjust contact stiffness each NR iteration (from Program Controlled setting)
keyo,cid,12,0              ! standard contact
keyo,cid,2,0               ! augmented Lagrange (from Program Controlled setting)
keyo,cid,4,0               ! on Gauss point (from Program Controlled setting)
keyo,cid,9,0               ! use real geometry with stepped effects
keyo,cid,7,0               ! No Prediction
rmod,tid,3,1.       ! FKN
rmod,tid,5,0.       ! ICONT
rmod,tid,6,0.       ! PINB
rmod,tid,10,0.      ! CNOF
rmod,tid,12,0.      ! FKT
rmod,tid,36,27      ! WB DSID
rmod,cid,3,1.       ! FKN
rmod,cid,5,0.       ! ICONT
rmod,cid,6,0.       ! PINB
rmod,cid,10,0.      ! CNOF
rmod,cid,12,0.      ! FKT
rmod,cid,36,27      ! WB DSID
nsel,all
esel,all
/com,*********** Fixed Supports ***********
CMBLOCK,_FIXEDSU,NODE,      750
(8i10)
       122       123       124       125       126       127       128       129
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cmsel,s,_FIXEDSU
d,all,all
nsel,all
/com,*********** Define Vertex Force Using Follower Elements ***********
et,5,201
keyo,5,1,1           ! Keep the direction constant
keyo,5,2,1           ! Apply Forces only, not moment
mat,5
real,5
type,5
en,12504,5635
r,5
rmod,5,1,1.0,              ! FX
mat,6
real,6
type,5
en,12505,5635
r,6
rmod,6,2,1.0,              ! FY
mat,7
real,7
type,5
en,12506,5635
r,7
rmod,7,3,1.0,              ! FZ

*DIM,_loadvari40x,TABLE,3,1,1,TIME
! Time values
*TAXIS,_loadvari40x(1),1,0.,1.,2.
! Load values
_loadvari40x(1,1,1) = 0.
_loadvari40x(2,1,1) = 0.
_loadvari40x(3,1,1) = 2500.


*DIM,_loadvari40y,TABLE,3,1,1,TIME
! Time values
*TAXIS,_loadvari40y(1),1,0.,1.,2.
! Load values
_loadvari40y(1,1,1) = 0.
_loadvari40y(2,1,1) = 0.
_loadvari40y(3,1,1) = -12000.


/com,*********** Define Vertex Force Using Follower Elements ***********
et,8,201
keyo,8,1,1           ! Keep the direction constant
keyo,8,2,1           ! Apply Forces only, not moment
mat,8
real,8
type,8
en,12507,5636
r,8
rmod,8,1,1.0,              ! FX
mat,9
real,9
type,8
en,12508,5636
r,9
rmod,9,2,1.0,              ! FY
mat,10
real,10
type,8
en,12509,5636
r,10
rmod,10,3,1.0,              ! FZ

*DIM,_loadvari42x,TABLE,3,1,1,TIME
! Time values
*TAXIS,_loadvari42x(1),1,0.,1.,2.
! Load values
_loadvari42x(1,1,1) = 0.
_loadvari42x(2,1,1) = 0.
_loadvari42x(3,1,1) = -2500.


/com,*********** Create Displacement Tables and Functions ******

*DIM,_loadvari45xp,TABLE,2,1,1,TIME
! Time values
*TAXIS,_loadvari45xp(1),1,0.,1.
! Load values
_loadvari45xp(1,1,1) = 0.
_loadvari45xp(2,1,1) = -0.151


*DIM,_loadvari45xn,TABLE,2,1,1,TIME
! Time values
*TAXIS,_loadvari45xn(1),1,0.,1.
! Load values
_loadvari45xn(1,1,1) = 0.
_loadvari45xn(2,1,1) = 0.151


fini
/com,****************************************************************************
/com,*************************    SOLUTION       ********************************
/com,****************************************************************************
/solu
antype,0                   ! static analysis
nlgeom,on                  ! Turn on Large Deformation Effects
_thickRatio=  1     ! Ratio of thick parts in the model
eqsl,pcg,1e-8,,,,,,1
cntr,print,1               ! print out contact info and also make no initial contact an error
dmpoption,emat,no             ! Don't combine emat file for DANSYS
dmpoption,esav,no             ! Don't combine esav file for DANSYS
nldiag,cont,iter           ! print out contact info each equilibrium iteration
rescontrol,define,last,last,,dele	   ! Program Controlled
/com,****************************************************
/com,******************* SOLVE FOR LS 1 OF 2 ****************
esel,s,real,,5
sfe,all,1,pres,1,%_loadvari40x%
esel,s,real,,6
sfe,all,1,pres,1,%_loadvari40y%
esel,s,real,,7
sfe,all,1,pres,1,0.
esel,s,real,,8
sfe,all,1,pres,1,%_loadvari42x%
esel,s,real,,9
sfe,all,1,pres,1,0.
esel,s,real,,10
sfe,all,1,pres,1,0.
esel,all
/com,*** Set Displacements ***
CMBLOCK,_CM45UX_XP,NODE,        1
(8i10)
      5485
cmsel,s,_CM45UX_XP
d,all,ux,%_loadvari45xp%
nsel,all

/com,*** Component For All Non-Zero UX Displacements ***
cmsel,s,_CM45ux_xp
cm,_DISPNONZEROUX,NODE
nsel,all

autots,on                  ! Workbench Program Controlled automatic time stepping
nsub,1,10,1                ! due to presence of general nonlinear
time,1.
outres,erase
outres,all,none
outres,nsol,all,
outres,rsol,all
outres,eangl,all
outres,etmp,all
outres,veng,all
outres,strs,all,
outres,epel,all,
outres,eppl,all,
outres,cont,all,
! *********** WB SOLVE COMMAND ***********
! check interactive state
*get,ANSINTER_,active,,int
*if,ANSINTER_,ne,0,then
/eof
*endif
solve
/com *************** Write FE CONNECTORS *********
CEWRITE,file,ce,,INTE
/com,****************************************************
/com,*************** FINISHED SOLVE FOR LS 1 *************
/com,****************************************************
/com,******************* SOLVE FOR LS 2 OF 2 ****************
/com,*** Set Displacements ***
autots,on                  ! Workbench Program Controlled automatic time stepping
nsub,1,10,1                ! due to presence of general nonlinear
time,2.
outres,erase
outres,all,none
outres,nsol,all,
outres,rsol,all
outres,eangl,all
outres,etmp,all
outres,veng,all
outres,strs,all,
outres,epel,all,
outres,eppl,all,
outres,cont,all,
solve
/com,****************************************************
/com,*************** FINISHED SOLVE FOR LS 2 *************
*get,_PCGITER,active,,solu,cgiter
/post1
fini
